Simulations: Version=216
  Simulation
    Clock: Start=2024-09-01; End=2025-02-28
    Summary
    Weather: FileName=data/Sorriso_A904_2024-09-01_a_2025-02-28.met
    SoilArbitrator
    MicroClimate: a_interception=0; b_interception=1; c_interception=0; d_interception=0; SoilHeatFluxFraction=0.4; MinimumHeightDiffForNewLayer=0; NightInterceptionFraction=0.5; ReferenceHeight=2
    Zone Field: Area=10; Slope=0; AspectAngle=0; Altitude=50
      Report: EventNames=[Clock].DoReport
        VariableNames:
          [Clock].Today
          [Wheat].LAI
          [Wheat].Phenology.Zadok.Stage
          [Wheat].Phenology.CurrentStageName
          [Wheat].AboveGround.Wt
          [Wheat].AboveGround.N
          [Wheat].Grain.Total.Wt*10 as Yield
          [Wheat].Grain.Protein
          [Wheat].Grain.Size
          [Wheat].Grain.Number
          [Wheat].Grain.Total.Wt
          [Wheat].Grain.Total.N
          [Wheat].Total.Wt
          [Soil].Water.PAW
          [Soil].Water.PAWmm
          [Soil].SoilWater.Water
          [Weather].Rain
          [Wheat].Leaf.Fw
          [Wheat].Leaf.Fn
          [Wheat].Leaf.WaterDemand
          [Soil].SoilWater.Eo
          [Soil].SoilWater.Es
          [Soil].SoilWater.Drainage
          [Soil].SoilWater.Runoff
          [Soil].Water.MM
          [Wheat].WaterUptake
          [Wheat].Root.FASW
          [Wheat].Root.WaterUptake
          [Wheat].Leaf.PotentialEP
          [Wheat].Leaf.LAI
          [Wheat].Grain.Total.Wt
      Soil: ASCOrder=Vertosol; ASCSubOrder=Black; SoilType=Clay; Site=Norwin; NearestTown=Norwin; Region=Darling Downs and Granite Belt; State=Queensland; Country=Australia; NaturalVegetation=Qld. Bluegrass, possible Qld. Blue gum; ApsoilNumber=900; Latitude=-27.581836; Longitude=151.320206; LocationAccuracy=+/- 20m; YearOfSampling=0
        DataSource=CSIRO Sustainable Ecosystems, Toowoomba; Characteriesd as part of the GRDC funded project"Doing it better, doing it smarter, managing soil water in Australian agriculture' 2011
        Comments=Clay - OC, CLL for all crops estimated-based on Bongeen Mywybilla Soil No1
        Physical
          Thickness  BD       AirDry    LL15      DUL       SAT       KS
          150        1.01056  0.13025   0.2605    0.521     0.588655  20
          150        1.07146  0.198689  0.248362  0.496723  0.565677  20
          300        1.09394  0.28      0.28      0.488438  0.557193  20
          300        1.15861  0.28      0.28      0.480297  0.532787  20
          300        1.17301  0.28      0.28      0.471584  0.527354  20
          300        1.16287  0.28      0.28      0.457071  0.53118   20
          300        1.1875   0.28      0.28      0.452332  0.521888  20
          SoilCrop WheatSoil: LL=[0.261, 0.248, 0.28, 0.306, 0.36, 0.392, 0.446]; KL=[0.06, 0.06, 0.06, 0.04, 0.04, 0.02, 0.01]; XF=[1, 1, 1, 1, 1, 1, 1]
        WaterBalance SoilWater: SummerDate=1-Nov; SummerU=5; SummerCona=5; WinterDate=1-Apr; WinterU=5; WinterCona=5; DiffusConst=40; DiffusSlope=16; Salb=0.12; CN2Bare=73; CNRed=20; CNCov=0.8; PSIDul=-100; Thickness=[150, 150, 300, 300, 300, 300, 300]; SWCON=[0.3, 0.3, 0.3, 0.3, 0.3, 0.3, 0.3]
        Organic: FOMCNRatio=40; CarbonUnits=Total
          Thickness  Carbon  SoilCNRatio  FBiom  FInert  FOM
          150        1.2     12           0.04   0.4     347.129
          150        0.96    12           0.02   0.6     270.344
          300        0.6     12           0.02   0.8     163.972
          300        0.3     12           0.02   1       99.4541
          300        0.18    12           0.01   1       60.322
          300        0.12    12           0.01   1       36.5871
          300        0.12    12           0.01   1       22.1912
        Chemical: Thickness=[150, 150, 300, 300, 300, 300, 300]; PH=[8, 8, 8, 8, 8, 8, 8]; PHUnits=Water
        Water: Thickness=[150, 150, 300, 300, 300, 300, 300]; FilledFromTop=true
          InitialValues=[0.521, 0.496723, 0.488438, 0.480297, 0.471584, 0.457071, 0.452332]
        Nutrient
        Solute NO3: Thickness=[150, 150, 300, 300, 300, 300, 300]; InitialValues=[1, 1, 1, 1, 1, 1, 1]; InitialValuesUnits=ppm; WaterTableConcentration=0; D0=0; DepthConstant=0; MaxDepthSoluteAccessible=0; RunoffEffectivenessAtMovingSolute=0; MaxEffectiveRunoff=0
        Solute NH4: Thickness=[150, 150, 300, 300, 300, 300, 300]; InitialValues=[0.1, 0.1, 0.1, 0.1, 0.1, 0.1, 0.1]; InitialValuesUnits=ppm; WaterTableConcentration=0; D0=0; DepthConstant=0; MaxDepthSoluteAccessible=0; RunoffEffectivenessAtMovingSolute=0; MaxEffectiveRunoff=0
        Solute Urea: Thickness=[150, 150, 300, 300, 300, 300, 300]; InitialValues=[0, 0, 0, 0, 0, 0, 0]; InitialValuesUnits=kg/ha; WaterTableConcentration=0; D0=0; DepthConstant=0; MaxDepthSoluteAccessible=0; RunoffEffectivenessAtMovingSolute=0; MaxEffectiveRunoff=0
        SoilTemperature Temperature: InteractionsPerDay=8
      Plant Wheat
      Manager Harvest
        Crop = [Wheat]
```csharp
using APSIM.Shared.Utilities;
using Models.Utilities;
using Models.Soils;
using Models.PMF;
using Models.Core;
using System;
using System.Linq;

namespace Models
{
    [Serializable] 
    public class Script : Model
    {
        [Description("Crop")]
        public IPlant Crop { get; set; }
        
        [EventSubscribe("DoManagement")]
        private void OnDoManagement(object sender, EventArgs e)
        {
            if (Crop.IsReadyForHarvesting)
            {
                Crop.Harvest();
                Crop.EndCrop();
            }
        }
    }
}
```
      Manager CentrePivot
        IrrigStart = 1-sep
        IrrigEnd = 28-feb
        SoilDepth = 500
        CritPAWForShallow = 60
        CritRainToPause = 30
        DaysToPauseOnCritRain = 3
        IrrigReturnShallow = 2
        IrrigAmtShallow = 10
        PercPAWIrrigDeficitShallow = 0
        IrrigEffShallow = 100
        IrrigReturnDeep = 4
        IrrigAmtDeep = 20
        IrrigDeficitDeep = 25
        IrrigEffDeep = 100
```csharp
using Models.Soils;
using System;
using System.Linq;
using System.Diagnostics;
using Models.Core;
using Models.Interfaces;
using APSIM.Shared.Utilities;

//using Models.PMF;

namespace Models
{
    [Serializable]
    public class Script : Model
    {
        [Link] Clock clock;
        [Link] IWeather weather;
        [Link] Irrigation irrigation;
        [Link] ISummary summary;
        [Link] Physical physical;
        [Link] Water water;
        //[Link(ByName = true)] private Plant Wheat;
    
        [Separator("All soils")]

        [Description("Start of irrigation season (dd-mmm)")] 
        public string IrrigStart { get; set; }

        [Description("End of irrigation season (dd-mmm)")] 
        public string IrrigEnd { get; set; }

        [Description("Enter the depth to which water deficit is computed (mm)")] 
        public double SoilDepth { get; set; }
        
        [Description("PAW below which soil is considered 'shallow' (mm)")] 
        public double CritPAWForShallow { get; set; }

        [Description("Amount of rainfall over the last 3 days to cause pause to irrigator (mm)")] 
        public double CritRainToPause { get; set; }

        [Description("Number of days to pause irrigator after critical delay (days)")] 
        public double DaysToPauseOnCritRain { get; set; }
        
        [Separator("Shallow soils")]
        
        [Description("Irrigation return period for shallow soils (days)")] 
        public double IrrigReturnShallow { get; set; }

        [Description("Effective irrigation amount for shallow soils (mm)")] 
        public double IrrigAmtShallow { get; set; }

        [Description("Percentage of PAW at which to irrigate shallow soils (%)")] 
        public double PercPAWIrrigDeficitShallow { get; set; }

        [Description("Irrigation efficiency for shallow soils (%)")] 
        public double IrrigEffShallow { get; set; }

        [Separator("Deep soils")]
        
        [Description("Irrigation return period for deep soils (days)")] 
        public double IrrigReturnDeep { get; set; }

        [Description("Effective irrigation amount for deep soils (mm)")] 
        public double IrrigAmtDeep { get; set; }

        [Description("Percentage of PAW at which to irrigate deep soils (%)")] 
        public double IrrigDeficitDeep { get; set; }

        [Description("Irrigation efficiency for deep soils (%)")] 
        public double IrrigEffDeep { get; set; }


        // Output variables
        [Units("mm")]
        public double TodayDeficit {get; set; }
         
        [Units("mm")]
        public double TodayDeficit_nve {get; set; }
         
        [Units("")]
        public double IrrigDay {get; set; }
         
        [Units("")]
        public double SoilPAW {get; set; }
         
        [Units("")]
        public double IrrigDeficit {get; set; }
        
        [Units("")]
        public double IrrigReturn {get; set; }
        
        [Units("")]
        public double IrrigAmt {get; set; }
        
        [Units("")]
        public double IrrigEff {get; set; }
        
        [Units("mm")]
        public double Rain3 {get; set; }
        
        [Units("mm")]
        public double[] Rain_3 {get; set; } = new double[3];
        
        [Units("")]
        public double Days2Pause {get; set; }

         // private variables
        private double irrigDeficitShallow {get; set; }

        
        [EventSubscribe("StartOfSimulation")]
        private void OnStartOfSimulation(object sender, EventArgs e)
        {
            IrrigDay = 5000;  // so will reset to 1 on first day

            Rain3 = 0.0;
            Rain_3[0] = 0.0; Rain_3[1] = 0.0; Rain_3[2] = 0.0;

            SoilPAW = 0.0;
            double mySoilDepth = 0;
            
            
            
            for (int z = 0; z <= physical.Thickness.Length - 1; z++)
            {
                mySoilDepth = mySoilDepth + physical.Thickness[z];
                if (mySoilDepth <= SoilDepth)
                    SoilPAW = SoilPAW + physical.DULmm[z] - physical.LL15mm[z];
                    
            }
            if (SoilPAW <= CritPAWForShallow)
            {
                IrrigDeficit = PercPAWIrrigDeficitShallow / (double)100 * SoilPAW;
                IrrigReturn = IrrigReturnShallow;
                IrrigAmt = IrrigAmtShallow;
                IrrigEff = IrrigEffShallow;
                summary.WriteMessage(this, "Soil is considered to be shallow " + CritPAWForShallow + " " + SoilPAW, MessageType.Information);
            }
            else
            {
                IrrigDeficit = IrrigDeficitDeep;
                IrrigReturn = IrrigReturnDeep;
                IrrigAmt = IrrigAmtDeep;
                IrrigEff = IrrigEffDeep;
                summary.WriteMessage(this, "Soil is considered to be deep", MessageType.Information);
            }

            summary.WriteMessage(this, $"Irrigation critical deficit (mm): {IrrigDeficit}", MessageType.Information);
            summary.WriteMessage(this, $"        Irrigation return (days): {IrrigReturn}", MessageType.Information);
            summary.WriteMessage(this, $"   Irrigation pumped amount (mm): {IrrigAmt}", MessageType.Information);
            summary.WriteMessage(this, $"       Irrigation efficiency (%): {IrrigEff}", MessageType.Information);
        }
        
        
        [EventSubscribe("DoManagement")]
        private void OnDoManagement(object sender, EventArgs e)
        {
            Rain_3[2] = Rain_3[1];
            Rain_3[1] = Rain_3[0];
            Rain_3[0] = weather.Rain;
            Rain3 = Rain_3[0] + Rain_3[1] + Rain_3[2];
            if (Rain3 >= CritRainToPause)
                Days2Pause = DaysToPauseOnCritRain;
            else
                Days2Pause = Days2Pause - 1;

            TodayDeficit = 0.0;
            SoilPAW = 0.0;
            double mySoilDepth = 0;

            for (int z = 0; z <= physical.Thickness.Length - 1; z++)
            {
                mySoilDepth = mySoilDepth + physical.Thickness[z];
                if (mySoilDepth <= SoilDepth)
                {
                    SoilPAW = SoilPAW + physical.DULmm[z] - physical.LL15mm[z];
                    TodayDeficit = TodayDeficit + physical.DULmm[z] - Math.Min(physical.DULmm[z], water.MM[z]);
                }
            }
            TodayDeficit_nve = -1 * TodayDeficit;

            if (DateUtilities.WithinDates(IrrigStart, clock.Today, IrrigEnd))
            {
                if (SoilPAW <= CritPAWForShallow)
                {
                    IrrigDeficit = PercPAWIrrigDeficitShallow / 100 * SoilPAW;
                    IrrigReturn = IrrigReturnShallow;
                    IrrigAmt = IrrigAmtShallow;
                    IrrigEff = IrrigEffShallow;
                }
                else
                {
                    IrrigDeficit = IrrigDeficitDeep;
                    IrrigReturn = IrrigReturnDeep;
                    IrrigAmt = IrrigAmtDeep;
                    IrrigEff = IrrigEffDeep;
                }

                if (Days2Pause < 0.5)
                {
                    IrrigDay = IrrigDay + 1;
                    if (IrrigDay > IrrigReturn)
                        IrrigDay = 1;// and day = 1 is when the irrigation happens

                    if (TodayDeficit >= IrrigDeficit)
                    {
                        if (IrrigDay == 1)
                            irrigation.Apply(amount: IrrigAmt / (IrrigEff / 100.0));
                    }
                }
            }
        }    
    }
}
```
      Manager Sow using a variable rule
        Crop = [Wheat]
        StartDate = 1-sep
        EndDate = 31-oct
        MinESW = 100
        MinRain = 25
        RainDays = 7
        CultivarName = Axe
        SowingDepth = 30
        RowSpacing = 250
        Population = 120
```csharp
using APSIM.Numerics;
using Models.Climate;
using System.Linq;
using System;
using Models.Core;
using Models.PMF;
using Models.Soils;
using Models.Utilities;
using APSIM.Shared.Utilities;
using Models.Interfaces;

namespace Models
{
    [Serializable]
    public class Script : Model
    {
        [Link] private Clock Clock;
        [Link] private Fertiliser Fertiliser;
        [Link] private Summary Summary;
        [Link] private Soil Soil;
        private Accumulator accumulatedRain;
        [Link]
        private ISoilWater waterBalance;
        
        [Description("Crop")]
        public IPlant Crop { get; set; }

        [Description("Start of sowing window (d-mmm)")]
        public string StartDate { get; set; }

        [Description("End of sowing window (d-mmm)")]
        public string EndDate { get; set; }

        [Description("Minimum extractable soil water for sowing (mm)")]
        public double MinESW { get; set; }

        [Description("Accumulated rainfall required for sowing (mm)")]
        public double MinRain { get; set; }

        [Description("Duration of rainfall accumulation (d)")]
        public int RainDays { get; set; }

        [Display(Type = DisplayType.CultivarName)]
        [Description("Cultivar to be sown")]
        public string CultivarName { get; set; }

        [Description("Sowing depth (mm)")]
        public double SowingDepth { get; set; }

        [Description("Row spacing (mm)")]
        public double RowSpacing { get; set; }

        [Description("Plant population (/m2)")]
        public double Population { get; set; }
        
        
        [EventSubscribe("StartOfSimulation")]
        private void OnSimulationCommencing(object sender, EventArgs e)
        {
            accumulatedRain = new Accumulator(this, "[Weather].Rain", RainDays);
        }

        [EventSubscribe("DoManagement")]
        private void OnDoManagement(object sender, EventArgs e)
        {
            accumulatedRain.Update();
            
            if (DateUtilities.WithinDates(StartDate, Clock.Today, EndDate) &&
                !Crop.IsAlive &&
                MathUtilities.Sum(waterBalance.ESW) > MinESW &&
                accumulatedRain.Sum > MinRain)
            {
                Crop.Sow(population: Population, cultivar: CultivarName, depth: SowingDepth, rowSpacing: RowSpacing);    
            }
        }
    }
}
```
      Manager Fertilise at sowing
        Crop = [Wheat]
        FertiliserType = NO3N
        Amount = 160
```csharp
using Models.Soils;
using System;
using System.Linq;
using Models.Core;
using Models.PMF;
namespace Models
{
    [Serializable]
    public class Script : Model
    {
        [Link] Clock Clock;
        [Link] Fertiliser Fertiliser;
        
        [Description("Crop to be fertilised")]
        public IPlant Crop { get; set; }

        [Description("Type of fertiliser to apply? ")] 
        [Display(Type = DisplayType.FertiliserType)]public string FertiliserType { get; set; }
    
        [Description("Amount of fertiliser to be applied (kg/ha)")]
        public double Amount { get; set; }
        
        [EventSubscribe("Sowing")]
        private void OnSowing(object sender, EventArgs e)
        {
            Model crop = sender as Model;
            if (Crop != null && crop.Name.ToLower() == (Crop as IModel).Name.ToLower())
                Fertiliser.Apply(amount: Amount, type: FertiliserType);
        }
    }
}
```
      Irrigation
      Fertiliser
      SurfaceOrganicMatter: InitialResidueName=wheat; InitialResidueType=wheat; InitialResidueMass=500; InitialStandingFraction=0; InitialCPR=0; InitialCNR=100
      Manager Synchroniser
        Identifier = <undefined>
```csharp
using APSIM.Core;
using APSIM.Shared.Utilities;
using NetMQ.Sockets;
using NetMQ;
using System.Collections.Generic;
using System.IO;
using MessagePack;
using Models.Functions;
using Models.Utilities;
using Models.Surface;
using Models.Soils;
using Models.PMF;
using Models.Core;
using System;
using System.Linq;
using Models.Soils.Nutrients;

namespace Models
{
    [Serializable]
    public class Script : Model, IStructureDependency
    {
        [Link] private Clock clock;
        [Link] private Summary Summary;
        [NonSerialized]
        private RequestSocket connection;
        public IStructure Structure { private get; set; }
        

        [Description("Identifier")]
        public string Identifier { get; set;}



        

        [EventSubscribe("StartOfSimulation")]
        private void OnSimulationCommencing(object sender, EventArgs e)
        {
           if (Identifier == "<undefined>") {
               Console.WriteLine("Need an endpoint to connect to");
               Summary.WriteMessage(this, "Need an endpoint to connect to", MessageType.Error);
               return;
           } 
           Console.WriteLine("Identifier=" + Identifier);
           Identifier = "tcp://" + Identifier;
           connection = new RequestSocket(Identifier);
           connection.SendFrame("connect");
           var msg = connection.ReceiveFrameString(); 
           if (msg != "ok") { throw new Exception("Expected ok"); }
        }
        
        [EventSubscribe("EndOfDay")]
        private void OnEndOfDay(object sender, EventArgs e)
        {
           if (connection == null) { return; }
           bool moreToDo = true;
           connection.SendFrame("paused");
           while (moreToDo) {
             var msg = connection.ReceiveMultipartMessage();
             //Console.WriteLine("Got {0} parts, first = {1}", msg.FrameCount, msg[0].ConvertToString()); 
             if (msg.FrameCount <= 0) { continue ; }
              
             var command = msg[0].ConvertToString();
             if (command == "resume") { 
                moreToDo = false;
                
             } else if (command == "do" && msg.FrameCount >= 2) {
                 onDoCommand(msg);
                 connection.SendFrame("ok");
                 
             } else if (command == "set" && msg.FrameCount == 3) {
                 // set an apsim variable. 
                 //  arg 1 is the variable path (eg "[Nutrient].NO3.kgha"), 
                 //  arg 2 is the packed object                
                string variableName = MessagePackSerializer.Deserialize<string>( msg[1].Buffer );
                
                // See what type the apsim variable is
                var myType = Structure.Get(variableName).GetType();
                //Console.WriteLine("Got set {0}, my type is {1}", variableName, myType);
                
                object value = MessagePackSerializer.Deserialize<object>( msg[2].Buffer );
                //Console.WriteLine("Got set {0} of incoming type {1}", variableName, value.GetType());
                if (value.GetType().IsArray != myType.IsArray) 
                   throw new Exception("Array/scalar mismatch for " + variableName);
                    
                if (myType.IsArray) {
                   Type myElementType = myType.GetElementType();
                   Object[] values = (value as object[]);
                   if (isNumeric(myElementType)) {
                      var myValues = Array.ConvertAll(values, (e) => (double) e);
                      Structure.Set(variableName, myValues);
                   } else if (isInteger(myElementType)) {
                      var myValues = Array.ConvertAll(values, (e) => (int) e);
                      Structure.Set(variableName, myValues);
                   } else if (isString(myElementType)) {
                      var myValues = Array.ConvertAll(values, (e) => (string) e);
                      Structure.Set(variableName, myValues);
                   } else {
                      throw new Exception("Don't know what to do setting a " + myElementType + " variable");
                   }

                   //Type myElementType = myType.GetElementType();
                   //var values = Array.ConvertAll((object[])value, (e) => Convert.ChangeType(e, myElementType)) as System.Array;
                   //Console.WriteLine("Doing set {0} of type {1} ({2}) = ", variableName, 
                   //                  values.GetType(), values.GetType().GetElementType(),  
                   //                  values.GetValue(0).ToString());
                   //Structure.Set(variableName, values);
                } else {
                   Structure.Set(variableName, Convert.ChangeType(value, myType));
                }
                connection.SendFrame("ok");
                
             } else if (command == "get" && msg.FrameCount == 2) {
                string variableName = MessagePackSerializer.Deserialize<string>( msg[1].Buffer );
                object value = Structure.Get(variableName);
                if (value is IFunction function)
                    value = function.Value();
                else if (value != null && (value.GetType().IsArray || value.GetType().IsClass))
                {
                   try
                   {
                       value = ReflectionUtilities.Clone(value);
                   }
                   catch (Exception err)
                   {
                       throw new Exception($"Cannot report variable \"{variableName}\": Variable is a non-reportable type: \"{value?.GetType()?.Name}\".", err);
                   }
                }
             
                byte[] bytes;
                if (value != null) {
                   bytes = MessagePackSerializer.Serialize(value);
                } else {
                   //Console.WriteLine("Sending NA"); 
                   bytes = MessagePackSerializer.Serialize("NA"); // fixme. Probably a better way to do this
                } 
                //Console.WriteLine("Got get '{0}' of type '{1}', sending {2} bytes", variableName, value?.GetType(), bytes.Length); 

                connection.SendFrame(bytes);
             } else {
                throw new Exception("Expected resume/get/set, not '" + command + "'");
             }
           }
        }
        
        [Link] Fertiliser Fertiliser;
        [Link] Irrigation Irrigation;
        [Link] SurfaceOrganicMatter SOM;

        // Handle a command:
        // addFertiliser "amount" <double> "type" <string>
        // sowCrop "cropName" <string> "cultivarName" <string> "population" <double> "sowingDepth" <double> "rowSpacing" <double> 
        // harvestCrop "cropName" <string>
        // applyIrrigation "amount" <double>
        // tillage "type" <string : (chisel|disc|planter|burn)>
        // terminate
        
        public void onDoCommand(NetMQMessage msg) {
             // msg[0] is "do"
             var cmd = MessagePackSerializer.Deserialize<string>( msg[1].Buffer);
             if (cmd == "addFertiliser") {
                 double FertAmount = 0;
                 string FertType = "";
                 for (int i = 2; i < msg.FrameCount; i += 2 ) {
                    var vname = MessagePackSerializer.Deserialize<string>( msg[i].Buffer);
                    if ( vname == "amount" ) {
                        FertAmount = MessagePackSerializer.Deserialize<double>( msg[i + 1].Buffer);
                    } else if ( vname == "type" ) {
                        FertType = MessagePackSerializer.Deserialize<string>( msg[i + 1].Buffer);
                    }
                 }
                 if (FertAmount > 0) {
                    Console.WriteLine("Applying Fertiliser, amt={0} ", FertAmount); 
                    Fertiliser.Apply(amount: FertAmount, type: "NO3N" /* fixme */);
                 }
             } else if (cmd == "sowCrop") {
                 string cropName = "";
                 string cultivarName = "default";
                 double population = 5;
                 double sowingDepth = 50;
                 double rowSpacing = 1000;
                 for (int i = 2; i < msg.FrameCount; i += 2 ) {
                    var vname = MessagePackSerializer.Deserialize<string>( msg[i].Buffer);
                    if ( vname == "cropName" ) {
                        cropName = MessagePackSerializer.Deserialize<string>( msg[i + 1].Buffer);
                    } else  if ( vname == "cultivarName" ) {
                        cultivarName = MessagePackSerializer.Deserialize<string>( msg[i + 1].Buffer);
                    } else if ( vname == "population" ) {
                        population = MessagePackSerializer.Deserialize<double>( msg[i + 1].Buffer);
                    } else if ( vname == "sowingDepth" ) {
                        sowingDepth = MessagePackSerializer.Deserialize<double>( msg[i + 1].Buffer);
                    } else if ( vname == "rowSpacing" ) {
                        rowSpacing = MessagePackSerializer.Deserialize<double>( msg[i + 1].Buffer);
                    }
                 }
                 if (cropName != "") {
                    Plant crop = Structure.GetObject("[" + cropName + "]")?.Value as Plant;
                    if (crop == null) { throw new Exception("Cant find a component called  '" + cropName + "' to sow"); } 
                    crop.Sow(population:population, cultivar:cultivarName, depth:sowingDepth, rowSpacing:rowSpacing);
                    Console.WriteLine("Sowed a {0} crop", cropName); 
                 }    
             } else if (cmd == "harvestCrop") {
                 string cropName = "";
                 for (int i = 2; i < msg.FrameCount; i += 2 ) {
                    var vname = MessagePackSerializer.Deserialize<string>( msg[i].Buffer);
                    if ( vname == "cropName" ) {
                        cropName = MessagePackSerializer.Deserialize<string>( msg[i + 1].Buffer);
                    }
                 }
                 if (cropName != "") {
                    Plant crop = Structure.GetObject("[" + cropName + "]")?.Value as Plant;
                    if (crop == null) { throw new Exception("Cant find a component called  '" + cropName + "' to harvest"); }
                    crop.Harvest();
                    Console.WriteLine("Harvested a {0} crop", cropName); 
                 } 
             } else if (cmd == "applyIrrigation") {
                 double irrigAmount = 0;
                 for (int i = 2; i < msg.FrameCount; i += 2 ) {
                    var vname = MessagePackSerializer.Deserialize<string>( msg[i].Buffer);
                    if ( vname == "amount" ) {
                        irrigAmount = MessagePackSerializer.Deserialize<double>( msg[i + 1].Buffer);
                    }
                 }
                 if (irrigAmount > 0) {
                    Irrigation.Apply(amount:irrigAmount, willRunoff:true);
                    Console.WriteLine("Irrigated {0} ", irrigAmount, "mm"); 
                 }
                 
             } else if (cmd == "tillage") {
                 string implementName = "";
                 for (int i = 2; i < msg.FrameCount; i += 2 ) {
                    var vname = MessagePackSerializer.Deserialize<string>( msg[i].Buffer);
                    if ( vname == "type" ) {
                        implementName = MessagePackSerializer.Deserialize<string>( msg[i + 1].Buffer);
                    }
                 }
                 if ( TillageTypes.ContainsKey(implementName) ) {
                    TillageType tillageType = TillageTypes[implementName];
                    SOM.Incorporate(tillageType.fraction, tillageType.depth);
                    Console.WriteLine("Tilled with a {0}", implementName); 
                 } else {
                    throw new Exception("Cant find a tillage method called  '" + implementName + "' to till with");
                 }
             } else if (cmd == "terminate") {
                 clock.EndDate = clock.StartDate;
             }
        }
        
        
        private class TillageType {
           public double fraction;
           public double depth;
        }
        [NonSerialized]
        private static readonly Dictionary<string, TillageType> TillageTypes = new Dictionary<string, TillageType> { 
           {"chisel", new TillageType { fraction = 0.5, depth = 100 }},
           {"disc", new TillageType { fraction =  0.5, depth = 200 }},
           {"planter", new TillageType { fraction = 0.1, depth = 50 }}, 
           {"burn", new TillageType { fraction = 1.0, depth = 0}}
        };

        [EventSubscribe("EndOfSimulation")]
        private void OnSimulationEnding(object sender, EventArgs e)
        {
            if (connection == null) { return; }
            
            connection.SendFrame("finished");
            var msg = connection.ReceiveFrameString(); 
            if (msg != "ok") { throw new Exception("Expected ok at end"); }
            connection.Close();
            
            Console.WriteLine("Simulation Ending");
        }
        static bool isNumeric(Type type) {
                         switch (Type.GetTypeCode(type))
                            {
                                case TypeCode.Double:
                                case TypeCode.Single:
                                   return true;
                            }
                            return false;
                        }
                        static bool isInteger(Type type) {
                         switch (Type.GetTypeCode(type))
                            {
                                case TypeCode.Int16:
                                case TypeCode.Int32:
                                case TypeCode.Int64:
                                case TypeCode.UInt16:
                                case TypeCode.UInt32:
                                case TypeCode.UInt64:
                                   return true;
                            }
                            return false;
                        }
                        static bool isString(Type type) {
                         switch (Type.GetTypeCode(type))
                            {
                                case TypeCode.String:
                                   return true;
                            }
                            return false;
                        }       
   }
}
```
  DataStore
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